13.
16!/(2!*2!*2!*3!) = 435891456000
5.
8700 + 7500 - 3200 = 13000
6.
400 + 350 + 300 - 300 - 200 - 150 + 100 = 500
9.
C(n, m) := n!/(m!*(n - m)!)
A(n, m) := n!/(n - m)!
(C(12, 5)*9! - A(10, 6))/10! = 79.1583
10.
4*C(n + 4, n - 1) == 3*A(n + 2, 3) solve → [-13; 6; -2; -1]
