# Вариант 6
1.
y(x) := 0.5^(x + 2)
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0.5^(x + 2) == 0.4 solve → -0.678071905113
0.5^(-3.2 + 2) = 2.2974
integral(0.5^(x + 2) - 0.4, x = -3.2 .. -0.68) = 1.72859
p1 := 1.729/((4.6 - 0.4)*(0.9 + 3.2)) = 0.100407
p2 := 1 - p1 = 0.899593
# Ответ: 0,9
2.
sin(x)^5*cos(x) == 0 solve → [π/2; 0]
f(x) := sin(x)^5*cos(x)
g(x) := ln(sqrt(x^5) + 2)
integral(sin(x)^5*cos(x) - 0, x = 0 .. π/2) = 0.166667
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ln(sqrt(x^5) + 2) == 2 solve → [
    (e^4 - 4*e^2 + 4)^(1/5);
    -(2 - e^2)^(2/5)*(sqrt(2*sqrt(5) - 10) + sqrt(5) + 1)/4;
    -(2 - e^2)^(2/5)*(sqrt(5) - sqrt(2*sqrt(5) - 10) + 1)/4;
    (2 - e^2)^(2/5)*(sqrt(-2*sqrt(5) - 10) + sqrt(5) - 1)/4;
    (2 - e^2)^(2/5)
] = [1.96158; 0.60616 - 1.86557i; -1.58695 - 1.15299i; -1.58695 + 1.15299i; 0.60616 + 1.86557i]
integral(2 - 1*ln(sqrt(x^5) + 2), x = 0 .. 1.962) = 1.62024
P1 := 1.62/4 = 0.405
P3 := 0.167/4 = 0.04175
P2 := 1 - (P1 + P3) = 0.55325
3.
y1(x) := 2/x
y2(x) := 1.5*x
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integral(y2(x), x = 0 .. 1.155) + integral(y1(x), x = 1.155 .. 2) = 2.09861
integral(2 - 2/x, x = 1 .. 2) = 0.613706
P1 := 2.099/4 = 0.52475
integral(2 - 1.5*x, x = 0 .. 1.3333) = 1.33333
2/x == 1.5*x solve → [-1.15470053838; 1.15470053838] = [-1.1547; 1.1547]
integral(2 - 2/x, x = 1 .. 1.155) + integral(2 - 1.5*x, x = 1.155 .. 1.3333) = 0.0456514
P2 := (4 - 0.614 - 1.333 + 0.046)/4 = 0.52475
4.
N := 17
P := 0.75
A := 7
B := 11
C := 13
D := 10
E := 5
F := 12
M := 0 .. N
P1(N, M) := N!/(M!*(N - M)!)*P^M*(1 - P)^(N - M)
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M = [0; 1; 2; 3; 4; 5; 6; 7; 8; 9; 10; 11; 12; 13; 14; 15; 16; 17]
P1(N, M) = [5.82077e-11; 2.96859e-9; 7.12462e-8; 1.06869e-6; 1.12213e-5; 8.75259e-5; 0.000525156; 0.00247573; 0.009284; 0.027852; 0.0668448; 0.127613; 0.191419; 0.220868; 0.189316; 0.113589; 0.042596; 0.00751695]
# 4.2. Наиболее вероятное число попаданий - 13
# 4.3. Наименее вероятное число попаданий - 0
# 4.4.
# а) k<A
#
# б) k>=B
#
# в) k>C
#
# г) k<=D
#
# д) E<=k<=F
sum(P1(N, M), M = 0 .. A - 1) = 0.000625046
sum(P1(N, M), M = B .. N) = 0.892918
sum(P1(N, M), M = C + 1 .. N) = 0.353018
sum(P1(N, M), M = 0 .. D) = 0.107082
sum(P1(N, M), M = F .. E) = 0.426101
