1.
integral(A*x^4, x = 0 .. 3) == 1
d/dx(3/243*x^4) → 4*x^3/81
3/243
f(x) :=
    0 if x < 0
    4*x^3/81 if 0 < x < 3
    0 if x > 3
F(x) :=
    0 if x < 0
    3/243*x^4 if 0 < x < 3
    1 if x > 3
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M := integral(4/81*x^3*x, x = 0 .. 3) → 12/5
D := integral(4/81*x^3*x^2, x = 0 .. 3) - M → 18/5
σ := sqrt(D) → 3*sqrt(2)*sqrt(5)/5
P := F(4.15) - F(0.76) → 0.99588121284
integral(-2*cos(2*x), x = π/4 .. x) → 1 - sin(2*x)
2.
f(x) :=
    0 if x < π/4
    -2*cos(2*x) if π/4 < x < π/2
    0 if x > π/2
F(x) :=
    0 if x < π/4
    1 - sin(2*x) if π/4 < x < π/2
    1 if x > π/2
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M := integral(-2*cos(2*x)*x, x = π/4 .. π/2) → π/4 + 1/2
P := F(1.16) - F(0.16) → 0.26776855597
D := integral(-2*cos(2*x)*x^2, x = π/4 .. π/2) - M → π/4 + π^2/16 - 1
σ := sqrt(D) → sqrt(π/4 + π^2/16 - 1)
3.
f(x, y) := (-4*e^(nthroot(x, 4) + 8) + nthroot(6 + 4*y^2, 3))
integral(integral(f(x, y), x = 10 .. 14), y = 2 .. 28) → integral(integral(-4*e^(x^(1/4) + 8), x = 10 .. 14) + 4*(4*y^2 + 6)^(1/3), y = 2 .. 28)
integral(integral(-4*e^(x^(1/4) + 8), x = 10 .. 14) + 4*(4*y^2 + 6)^(1/3), y = 2 .. 28) = -7969683
g(x) := integral(f(x, y), y = 10 .. x) → 40*e^(x^(1/4) + 8) + integral((4*y^2 + 6)^(1/3), y = 10 .. x) - 4*x*e^(x^(1/4) + 8)
h(y) := integral(f(x, y), x = 2 .. y) → integral(-4*e^(x^(1/4) + 8), x = 2 .. y) + y*(4*y^2 + 6)^(1/3) - 2*(4*y^2 + 6)^(1/3)
M(x) := integral(g(x)*x, x = 10 .. 14) → integral(x*(40*e^(x^(1/4) + 8) + integral((4*y^2 + 6)^(1/3), y = 10 .. x) - 4*x*e^(x^(1/4) + 8)), x = 10 .. 14)
M(y) := integral(h(y)*y, y = 2 .. 28) → integral(y*(integral(-4*e^(x^(1/4) + 8), x = 2 .. y) + y*(4*y^2 + 6)^(1/3) - 2*(4*y^2 + 6)^(1/3)), y = 2 .. 28)
cov := integral(integral((x - M(x))*(y - M(y))*f(x, y), x = 10 .. 14), y = 2 .. 28) → integral(integral(-(x - integral(y*(integral(-4*e^(x^(1/4) + 8), x = 2 .. y) + y*(4*y^2 + 6)^(1/3) - 2*(4*y^2 + 6)^(1/3)), y = 2 .. 28))*(y - integral(y*(integral(-4*e^(x^(1/4) + 8), x = 2 .. y) + y*(4*y^2 + 6)^(1/3) - 2*(4*y^2 + 6)^(1/3)), y = 2 .. 28))*(4*e^(x^(1/4) + 8) - (4*y^2 + 6)^(1/3)), x = 10 .. 14), y = 2 .. 28)  # error: В экземпляре объекта не задана ссылка на объект.
4.
F(x, y) := (2*y + 5*x)^4/nthroot(7*x + 5.8*y, 5) + x^y
f(x, y) := d/dy(d/dx(F(x, y))) → 120*(5*x + 2*y)^2/(7*x + 5.8*y)^(1/5) - 56*(5*x + 2*y)^3/(5*(7*x + 5.8*y)^(6/5)) + x^(y - 1) + x^(y - 1)*y*ln(x) + 9.744*(5*x + 2*y)^4/(7*x + 5.8*y)^(11/5) - 23.2*(5*x + 2*y)^3/(7*x + 5.8*y)^(6/5)
M1 := integral(integral(x*f(x, y), x = 1.5 .. 3), y = 3 .. 5.4)  # error: This variable is undefined.
M2 := integral(integral(y*f(x, y), x = 1.5 .. 3), y = 3 .. 5.4)
D1 := integral(integral((x - M1)^2*f(x, y), x = 1.5 .. 3), y = 3 .. 5.4)
D2 := integral(integral((x - M2)^2*f(x, y), x = 1.5 .. 3), y = 3 .. 5.4)
σ1 := sqrt(D1)
σ2 := sqrt(D2)
M3 := integral(integral(x*y*f(x, y), x = 1.5 .. 3), y = 3 .. 5.4)
K := M3 - M1*M2
P := F(3, 5.4) - F(1.5, 5.4) - F(3, 3) + F(1.5, 3)
